<?xml version="1.0" ?>
<Node 	 name="root"  gravity="0 0 -9810.0"  dt="0.7"  >

    <RequiredPlugin pluginName="SofaOpenglVisual"/>
    <RequiredPlugin pluginName='SofaBoundaryCondition'/>
    <RequiredPlugin pluginName='SofaEngine'/>
    <RequiredPlugin pluginName='SofaGeneralDeformable'/>
    <RequiredPlugin pluginName='SofaImplicitOdeSolver'/>
    <RequiredPlugin pluginName='SofaMeshCollision'/>
    <RequiredPlugin pluginName='SofaMiscCollision'/>
    <RequiredPlugin pluginName='SofaMiscFem'/>
    <RequiredPlugin pluginName='SofaLoader'/> <!-- Needed to use components [MeshObjLoader, ]-->
    <RequiredPlugin pluginName='SofaRigid'/> <!-- Needed to use components [RigidMapping, ]-->
    <RequiredPlugin pluginName='SofaSimpleFem'/> <!-- Needed to use components [HexahedronFEMForceField, ]-->
    <RequiredPlugin pluginName='SofaConstraint'/> <!-- Needed to use components [FreeMotionAnimationLoop, GenericConstraintSolver, BilateralInteractionConstraint, UncoupledConstraintCorrection, ]-->
    <RequiredPlugin pluginName='SofaGeneralSimpleFem'/> <!-- Needed to use components [BeamFEMForceField, ]-->
    <RequiredPlugin pluginName='SofaMiscMapping'/> <!-- Needed to use components [BeamLinearMapping, ]-->

    <!-- Debemos poner un FreeMotion para que se consigan resolver los Constraints Billateral de forma correcta -->
    <FreeMotionAnimationLoop />
    <GenericConstraintSolver tolerance="0.001" maxIterations="1000"/>

    <VisualStyle name="VisualOptions" displayFlags="hideBehavior hideMechanicalMappings showAdvancedRendering showWireframe hideCollision showVisual" />
    <OglGrid size="1000" name="grid"/>
    <OglLineAxis size="@grid.size"/>
    <OglSceneFrame/>

    <DefaultPipeline name="DefaultCollisionPipeline"  verbose="0"  draw="0"  depth="6" />
    <BruteForceDetection name="Detection" />
    <MinProximityIntersection name="Proximity"  alarmDistance="0.03"  contactDistance="0.02" />
    <DefaultContactManager name="Response"  response="default" />
    <DefaultCollisionGroupManager />

    <Node name="Attach_1">

	    <Node name="Beam"  gravity="0 0 -9810.0"  >

			     <EulerImplicitSolver name="Implicit Euler Solver"  rayleighStiffness="0.1" rayleighMass="0.1" />
           <CGLinearSolver name="Conjugate Gradient" template="GraphScattered" iterations="25" tolerance="1e-5" threshold="1e-5"/>
           <SparseGridTopology name="Embedded Sparse Grid"  fileTopology="/home/juan/Escritorio/SOFA-features/beam_1_0_meshmixer/beam_1_0_meshmixer.obj"  n="2 2 121" />
			     <MechanicalObject template="Rigid3d" name="Particles"  translation="-732 0 -1.51"  rotation="90 0 90" restScale="1" externalForce="0 0 0"/>
			     <UniformMass template="Vec3d,double" name="MassBeam" totalMass="0.17906"/>
           <UncoupledConstraintCorrection />

    			 <BeamFEMForceField name="FEM" radius="0.1" youngModulus="70000000" poissonRatio="0.33"/>

 			     <FixedPlaneConstraint direction="0 1 0" dmin="-8" dmax="8" />

      			<Node 	name="CollisionNode"   >
      			    <MeshObjLoader name="loader"  filename="/home/juan/Escritorio/SOFA-features/beam_1_0_meshmixer/beam_1_0_meshmixer.obj" />
      			    <MeshTopology src="@loader" />
      			    <MechanicalObject />
      			    <TriangleCollisionModel  contactFriction="1" contactStiffness="10" />
      			    <BeamLinearMapping isMechanical="true" />
      			</Node>

      			<Node name="VisualNode"  gravity="0 0 -9810.0"  >
      				<MeshObjLoader name="meshLoader_0" filename="/home/juan/Escritorio/SOFA-features/beam_1_0_meshmixer/beam_1_0_meshmixer.obj" handleSeams="1"/>
      				<OglModel template="Vec3d" name="Objective_beam" src="@meshLoader_0"  sfactor="GL_SRC_ALPHA"  dfactor="GL_ONE_MINUS_SRC_ALPHA"/>
      				<BeamLinearMapping isMechanical="true" />
      			</Node>

      			<BoxROI name="box_roi" box="-10 -10 -10 10 10 10" drawBoxes="1"/>
      			<FixedConstraint template="Vec3d" indices="@[-1].indices" />

            <Node name="ConstraintPoint_beam_2">
                <MechanicalObject name="points_beam" template="Vec3d" position="0 3.7 21" />
                <BarycentricMapping/>
            </Node>

            <Node name="ConstraintPoint_beam_1">
                <MechanicalObject name="points_beam" template="Vec3d" position="0 3.7 1443" />
                <BarycentricMapping/>
            </Node>
      </Node>

      <Node name="Mass1" gravity="0 0 -9810.0">

            <EulerImplicitSolver name="Implicit Euler Solver"  rayleighStiffness="0.1" rayleighMass="0.1" />
            <CGLinearSolver name="Conjugate Gradient" iterations="25" tolerance="1e-5" threshold="1e-5"/>

            <MechanicalObject template="Rigid3d" name="DOF_Mass_1"  position="711 0 2.11 0.7071068 0 0 0.7071068"/>
            <UniformMass name="MassSolid1" totalMass="0.0464" />
            <UncoupledConstraintCorrection />

            <Node name="VisualNode_1">
                <MeshObjLoader name="meshLoader_0" filename="/home/juan/Escritorio/SOFA-features/beam_1_0_meshmixer/Sphere.obj" handleSeams="1" />
                <OglModel name="Visual" src="@meshLoader_0"  />
                <RigidMapping name="Visual Mapping 1" input="@../"  output="@Visual"/>
            </Node>

            <FixedPlaneConstraint direction="1 0 0" dmin="-20" dmax="20" />

            <Node name="ConstraintPoint_mass_1">
                <MechanicalObject name="points_mass_1" template="Vec3d" position="0 0 0&#x09;0 0 0" />
                <RigidMapping/>
            </Node>
      </Node>

      <BilateralInteractionConstraint template="Vec3d" object1="@Beam/ConstraintPoint_beam_1/points_beam" object2="@Mass1/ConstraintPoint_mass_1/points_mass_1" first_point="0" second_point="0" />

      <Node name="Mass2" gravity="0 0 -9810.0">

            <EulerImplicitSolver name="Implicit Euler Solver"  rayleighStiffness="0.1" rayleighMass="0.1" />
            <CGLinearSolver name="Conjugate Gradient" iterations="25" tolerance="1e-5" threshold="1e-5"/>

            <MechanicalObject template="Rigid3d" name="DOF_Mass_2"  position="-711 0 2.11 0.7071068 0 0 0.7071068"/>
            <UniformMass name="MassSolid2" totalMass="0.0464" />
            <UncoupledConstraintCorrection />

            <Node name="VisualNode_2">
                <MeshObjLoader name="meshLoader_1" filename="/home/juan/Escritorio/SOFA-features/beam_1_0_meshmixer/Sphere.obj" handleSeams="1" />
                <OglModel name="Visual" src="@meshLoader_1"  />
                <RigidMapping name="Visual Mapping 2" input="@../"  output="@Visual"/>
            </Node>

            <FixedPlaneConstraint direction="1 0 0" dmin="-20" dmax="20" />

            <Node name="ConstraintPoint_mass_2">
                <MechanicalObject name="points_mass_2" template="Vec3d" position="0 0 0&#x09;0 0 0" />
                <RigidMapping />
            </Node>
      </Node>

      <BilateralInteractionConstraint template="Vec3d" object1="@Beam/ConstraintPoint_beam_2/points_beam" object2="@Mass2/ConstraintPoint_mass_2/points_mass_2" first_point="0" second_point="0" />

  </Node>

</Node>
