<!-- BeamFEMForceField example -->
<?xml version="1.0"?>
<Node name="root" gravity="0 0 -9.81" dt="0.005">

  <RequiredPlugin pluginName="SofaOpenglVisual"/>
  <RequiredPlugin pluginName='SofaBoundaryCondition'/>
  <RequiredPlugin pluginName='SofaEngine'/>
  <RequiredPlugin pluginName='SofaGeneralDeformable'/>
  <RequiredPlugin pluginName='SofaImplicitOdeSolver'/>
  <RequiredPlugin pluginName='SofaMeshCollision'/>
  <RequiredPlugin pluginName='SofaMiscCollision'/>
  <RequiredPlugin pluginName='SofaMiscFem'/>
  <RequiredPlugin pluginName='SofaLoader'/> <!-- Needed to use components [MeshObjLoader, ]-->
  <RequiredPlugin pluginName='SofaRigid'/> <!-- Needed to use components [RigidMapping, ]-->
  <RequiredPlugin pluginName='SofaConstraint'/> <!-- Needed to use components [FreeMotionAnimationLoop, GenericConstraintSolver, BilateralInteractionConstraint, UncoupledConstraintCorrection, ]-->
  <RequiredPlugin pluginName='SofaGeneralSimpleFem'/> <!-- Needed to use components [BeamFEMForceField, ]-->
  <RequiredPlugin pluginName='SofaGeneralTopology'/> <!-- Needed to use components [CubeTopology, ]-->
  <RequiredPlugin pluginName='SofaMiscMapping'/> <!-- Needed to use components [BeamLinearMapping, ]-->
  <RequiredPlugin pluginName='SofaSparseSolver'/> <!-- Needed to use components [SparseLUSolver, ]-->

  <FreeMotionAnimationLoop />
  <GenericConstraintSolver tolerance="0.001" maxIterations="10000"/>

  <OglGrid size="1" name="grid"/>
  <OglLineAxis size="@grid.size"/>
  <OglSceneFrame/>

  <VisualStyle displayFlags="showForceFields hideCollisionModels showBehavior showWireframe" />

  <DefaultPipeline depth="6" verbose="0" draw="0" />
  <BruteForceDetection name="N2" />
  <MinProximityIntersection name="Proximity" alarmDistance="0.03" contactDistance="0.02" />
  <DefaultContactManager name="Response" response="default" />

  <Node name="beam">
      <EulerImplicitSolver rayleighStiffness="0" printLog="false"  rayleighMass="0.1" />
      <SparseLUSolver printLog="0" verbose="0"/>
      <MechanicalObject template="Rigid3d" name="beam_DOFs" position="0 0 0 0 0 0 1 0.026175 0 0 0 0 0 1
                                                                      0.05235 0 0 0 0 0 1 0.078525 0 0 0 0 0 1 0.1047 0 0 0 0 0 1 0.130875 0 0 0 0 0 1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"/>
      <MeshTopology name="lines" lines="0 1 1 2 2 3 3 4 4 5 5 6 6 7 7 8 8 9 9 10 10 11 11 12 12 13 13 14 14 15 15 16 16 17 17 18 18 19 19 20 20 21 21 22 22 23 23 24 24 25 25 26
                                        26 27 27 28"/>

      <FixedConstraint name="FixedConstraint" indices="0" />

      <!--<FixedConstraint name="FixedConstraint2" indices="0" />

      <OscillatorConstraint template="Rigid3d" name="OscillatingConstraint1" oscillators="0  0 0 0 0 0 0 1  0 0 0.01 0 0 0  21.2 0" />-->

      <UniformMass vertexMass="1 1 0.01 0 0 0 0.1 0 0 0 0.1" printLog="false" />
      <BeamFEMForceField name="FEM" radius="0.0107" youngModulus="70e9" poissonRatio="0.33"/>
      <FixedPlaneConstraint direction="0 1 0" dmin="-0.043" dmax="0.043" />
      <UncoupledConstraintCorrection/>

      <Node name="VisualNode_beam">
        <CubeTopology nx="15" ny="2" nz="2" min="0 -0.075 -0.0151" max="28 0.075 0.0151" />
        <OglModel name="Visual" color="1 1 0 1.0" />
        <BeamLinearMapping isMechanical="true" />
      </Node>

      <Node name="Collision_beam">
        <CubeTopology nx="15" ny="2" nz="2" min="0 -0.075 -0.0151" max="28 0.075 0.0151" />
        <MechanicalObject />
        <BeamLinearMapping isMechanical="true" />
        <TriangleCollisionModel />
      </Node>

      <Node name="ConstraintPoint_beam_1">
          <MechanicalObject name="points_beam_1" template="Vec3d" position="0 0 0" />
          <RigidMapping index="28"/>
      </Node>

  </Node>

  <Node name="Hip_body">

    <EulerImplicitSolver rayleighStiffness="0" printLog="false"  rayleighMass="0.1" />
    <SparseLUSolver printLog="0" verbose="0"/>
    <!--<MinResLinearSolver iterations="1000" tolerance="1e-9" printLog="1" verbose="0"/>-->

    <MechanicalObject template="Rigid3d" name="DOF_Mass_1"  position="0.7329 0 0 0.7071068 0 0 0.7071068"/>

    <UniformMass name="MassSolid2" totalMass="0.58" />
    <UncoupledConstraintCorrection />

    <Node name="Visual_mass2">
        <MeshObjLoader name="meshLoader_2" filename="mesh/sphere.obj" handleSeams="1" scale3d="0.022 0.022 0.022" translation="0 0 0" />
        <OglModel name="Visual" src="@meshLoader_2" color="1 1 0 1.0" />
        <RigidMapping input="@.." output="@Visual" />
    </Node>

    <Node name="Collision_mass2">
        <MechanicalObject />
        <SphereCollisionModel radius="0.0215"/>
        <RigidMapping index="0"/>
    </Node>

    <Node name="ConstraintPoint_hip">
        <MechanicalObject name="points_hip" template="Vec3d" position="0 0 0" />
        <RigidMapping index="0"/>
    </Node>

  </Node>

  <BilateralInteractionConstraint template="Vec3d" object1="@beam/ConstraintPoint_beam_1/points_beam_1" object2="@Hip_body/ConstraintPoint_hip/points_hip" first_point="0" second_point="0" />

  <Node name="Leg">

        <EulerImplicitSolver rayleighStiffness="0" printLog="false"  rayleighMass="0.1" />
        <SparseLUSolver printLog="0" verbose="0"/>

        <MechanicalObject template="Rigid3d" name="DOFs2" position="0.7329 0 0 0.707107 0 -0.707107 0
                                                                    0.7329 0 -0.1 0.707107 0 -0.707107 0
                                                                    0.7329 0 -0.2645 0.707107 0 -0.707107 0" />
        <MeshTopology name="lines" lines="0 1 1 2" />

        <UniformMass totalMass="0.01" printLog="false" />
        <BeamFEMForceField name="FEM" radius="0.0107" youngModulus="70e6" poissonRatio="0.33"/>
        <UncoupledConstraintCorrection/>

        <Node name="VisualNode_beam">
          <CubeTopology nx="2" ny="2" nz="2" min="0 -0.0151 -0.05" max="2 0.0151 0.05" />
          <OglModel name="Visual" color="1 1 0 1.0" />
          <BeamLinearMapping isMechanical="true" />
        </Node>

        <Node name="Collision_beam">
          <CubeTopology nx="2" ny="2" nz="2" min="0 -0.0151 -0.075" max="2 0.0151 0.075" />
          <MechanicalObject />
          <BeamLinearMapping isMechanical="true" />
          <TriangleCollisionModel />
        </Node>

        <Node name="ConstraintPoint_Leg_1">
            <MechanicalObject name="points_Leg_1" template="Vec3d" position="0 0 0" />
            <RigidMapping index="0"/>
        </Node>

        <Node name="ConstraintPoint_Leg_2">
            <MechanicalObject name="points_Leg_2" template="Vec3d" position="0 0 0" />
            <RigidMapping index="2"/>
        </Node>

  </Node>

  <BilateralInteractionConstraint template="Vec3d" object1="@beam/ConstraintPoint_beam_1/points_beam_1" object2="@Leg/ConstraintPoint_Leg_1/points_Leg_1" first_point="0" second_point="0" />

  <Node name="knee">

        <EulerImplicitSolver rayleighStiffness="0" printLog="false"  rayleighMass="0.1" />
        <SparseLUSolver printLog="0" verbose="0"/>

        <MechanicalObject template="Rigid3d" name="DOF_Mass_1"  position="0.7329 0 -0.2645 0.7071068 0 0 0.7071068"/>
        <UniformMass name="MassSolid2" totalMass="0.58" />
        <FixedPlaneConstraint direction="0 1 0" dmin="-0.043" dmax="0.043" />
        <UncoupledConstraintCorrection />

        <Node name="Visual_mass2">
            <MeshObjLoader name="meshLoader_2" filename="mesh/sphere.obj" handleSeams="1" scale3d="0.022 0.022 0.022" translation="0 0 0" />
            <OglModel name="Visual" src="@meshLoader_2" color="1 1 0 1.0" />
            <RigidMapping input="@.." output="@Visual" />
        </Node>

        <Node name="Collision_mass2">
            <MechanicalObject />
            <SphereCollisionModel radius="0.0215"/>
            <RigidMapping index="0"/>
        </Node>

          <Node name="ConstraintPoint_knee">
              <MechanicalObject name="points_knee" template="Vec3d" position="0 0 0&#x09;0 0 0" />
              <RigidMapping index="0"/>
          </Node>

  </Node>

  <BilateralInteractionConstraint template="Vec3d" object1="@Leg/ConstraintPoint_Leg_2/points_Leg_2" object2="@knee/ConstraintPoint_knee/points_knee" first_point="0" second_point="0" />

</Node>
